*Heading
** Job name: Patch1 Model name: Patch1
** Generated by: Abaqus/CAE 6.11-1
*Preprint, echo=NO, model=NO, history=NO, contact=NO
**
** PARTS
**
*Part, name=PART-1-MESH-1
*Node
1, 0.0, 0.0, -0.125
2, 1.0, 0.0, -0.125
3, 2.0, 0.0, -0.125
4, 3.0, 0.0, -0.125
5, 4.0, 0.0, -0.125
6, 5.0, 0.0, -0.125
7, 0.0, 1.0, -0.125
8, 1.0, 1.0, -0.125
9, 2.0, 1.0, -0.125
10, 3.0, 1.0, -0.125
11, 4.0, 1.0, -0.125
12, 5.0, 1.0, -0.125
13, 0.0, 0.0, 0.125
14, 1.0, 0.0, 0.125
15, 2.0, 0.0, 0.125
16, 3.0, 0.0, 0.125
17, 4.0, 0.0, 0.125
18, 5.0, 0.0, 0.125
19, 0.0, 1.0, 0.125
20, 1.0, 1.0, 0.125
21, 2.0, 1.0, 0.125
22, 3.0, 1.0, 0.125
23, 4.0, 1.0, 0.125
24, 5.0, 1.0, 0.125
*Element, type=C3D8
1, 1, 2, 8, 7, 13, 14, 20, 19
2, 2, 3, 9, 8, 14, 15, 21, 20
3, 3, 4, 10, 9, 15, 16, 22, 21
4, 4, 5, 11, 10, 16, 17, 23, 22
5, 5, 6, 12, 11, 17, 18, 24, 23
*End Part
**
**
** ASSEMBLY
**
*Assembly, name=Assembly
**
*Instance, name=PART-1-MESH-1-1, part=PART-1-MESH-1
*End Instance
**
*Nset, nset=BACK, instance=PART-1-MESH-1-1
 1, 2, 3, 4, 5, 6, 7, 8, 9, 10, 11, 12
*Nset, nset=TOP, instance=PART-1-MESH-1-1
 7, 8, 19, 20
*Nset, nset=BOTTOM, instance=PART-1-MESH-1-1
 1, 2, 13, 14
*End Assembly
**
** BOUNDARY CONDITIONS
**
** Name: Disp-BC-2 Type: Displacement/Rotation
*Boundary
BOTTOM, 3, 3
BOTTOM, 2, 2
BOTTOM, 1, 1
TOP, 3, 3
TOP, 1, 1
** ----------------------------------------------------------------
**
** STEP: tension
**
*Step, name=tension, inc=10000
*Static
0.001, 1.0, 1e-07, 0.001
**
** BOUNDARY CONDITIONS
**
** Name: Vel-BC-1 Type: Velocity/Angular velocity
*Boundary, type=VELOCITY
TOP, 2, 2, -1.
**
** CONTROLS
**
*Controls, reset
*Controls, parameters=time incrementation
3200, 4000, , 6000, 4800, 50, , 125, , ,
**
** OUTPUT REQUESTS
**
*Restart, write, frequency=0
**
** FIELD OUTPUT: F-Output-1
**
*Output, field, variable=PRESELECT
**
** HISTORY OUTPUT: H-Output-1
**
*Output, history, variable=PRESELECT
*End Step
